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g^(k + 1) == Δf(x^(k + 1))
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f(x_1, x_2) := 5/2*x_1^2 + 1/2*x_2^2 + 2*x_1*x_2 - 3*x_1 - x_2
f'(x_1, x_2) := [d/dx_1(f(x_1, x_2)); d/dx_2(f(x_1, x_2))] → [5*x_1 + 2*x_2 - 3; 2*x_1 + x_2 - 1]
# a)
(5/2)/(1/2) = 5
(1/2)/(1/2) = 1
2/(1/2) = 4
x := [x_1; x_2]  # error: This variable is undefined. Check that the label is set correctly.
Q := [5, 2; 2, 1]
b := [3; 1]
x_0 := [0; 0]
# b)
g_0 := f'(0, 0) → [-3; -1]
d_0 := -g_0 → [3; 1]
a_0 := -transpose(g_0)*d_0/(transpose(d_0)*Q*d_0) = 0.172414
x_k_1 := x_0 + a_0*d_0 = [0.517241; 0.172414]
g_1 := f'(x_k_1[0, 0], x_k_1[1, 0]) = [-0.0689655; 0.206897]
d_1 := -g_1 = [0.0689655; -0.206897]
b_1 := transpose(g_1)*Q*d_0/(transpose(d_0)*Q*d_0) = 0.00475624
d_1 := -g_1 + b_1*d_0 = [0.0832342; -0.20214]
a_1 := -transpose(g_1)*d_1/(transpose(d_1)*Q*d_1) = 5.8
x_k_2 := x_k_1 + a_1*d_1 = [1; -1]
# c)
# The minimizer is given by x_pred := Q^-1*b
Q^-1*b = [1; -1]  # this agrees with part b
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# Yes it is
# 1) The search direction is of the form d^k == H_k*Grad(f(x^k))for matrix H_k := F(x^k)^-1
# 2) The matrix H_k == F(x^k)^-1is symmetric for f in C^2 (as shown in exercise description)
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