f_2(x_1, x_2) := 5*x_1 + 8*x_2 + x_1*x_2 - x_1^2 - 2*x_2^2
[
    d^2/dx_1^2(f_2(x_1, x_2)), d/dx_1(d/dx_2(f_2(x_1, x_2)));
    d/dx_1(d/dx_2(f_2(x_1, x_2))), d^2/dx_2^2(f_2(x_1, x_2))
] → [-2, 1; 1, -4]
d/dx_1(d/dx_2(f_2(x_1, x_2))) → 1
f(x, y) := 3*x^2 - 4*x*y + 7*y^2
d/dx(f(x, y)) → 6*x - 4*y
d/dy(f(x, y)) → 14*y - 4*x
F(x) := [d/dx(f(x, y)); d/dy(f(x, y))] → [6*x - 4*y; 14*y - 4*x]
[d^2/dx^2(f(x, y)), d/dy(d/dx(f(x, y))); d/dx(d/dy(f(x, y))), d^2/dy^2(f(x, y))] → [6, -4; -4, 14]
