# 9.1a
fx(x) := (x - x_0)^4  # error: This variable is undefined. Check that the label is set correctly.  # objective function
fx'(x) := d/dx(fx(x)) → -4*(x_0 - x)^3  # gradient
F(x) := d/dx(fx'(x)) → 12*(x_0 - x)^2  # Hessian of f(x)
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x^(k + 1) == x^k - F(x^k)^-1*g(k)
g(k) := fx'(k)  # error: This variable is undefined. Check that the label is set correctly.
x_k1 := x^k - F(x^k)^-1*g(x^k) → x_0/3 + 2*x^k/3
x^k - (x^k - x_0)/3 == x_k1 → 1
# We solve for x^k+1-x0
x^(k + 1) == x_0/3 + 2*x^k/3  # Minus x0 on both
x^(k + 1) - x_0 == x_0/3 - x_0 + 2*x^k/3  # Make x0 on divided by 3
x^(k + 1) - x_0 == x_0/3 - 3*x_0/3 + 2*x^k/3
x^(k + 1) - x_0 == 2*x_0/3 + 2*x^k/3
x^(k + 1) - x_0 == 2/3*(x^k - x_0)
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y^k == |x^k - x_0|
x^(k + 1) - x_0 == 2/3*(x^k - x_0)
# ->
x^k - x_0 == 2/3*(x^(k - 1) - x_0)
# since
y^k == |x^k - x_0|
y^(k - 1) == |x^(k - 1) - x_0|
x^k - x_0 == 2/3*(x^(k - 1) - x_0) == 2/3*|x^(k - 1) - x_0| == 2/3*y^(k - 1)
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y^k == 2/3*y^(k - 1)
# this means that
y^(k + 1) == 2/3*(2/3*y^(k - 1))
# therefore we kan modulate
y^k == (2/3)^k*y^0
# As we can see, k will continue to get larger and make 2/3 smaller making
y^k - □ > 0  # y^(k) will towards 0
# therefore x^(k) will go towards x0 every time.
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f(x) := x^(4/3)
f'(x) := d/dx(f(x)) → 4*x^(1/3)/3
F(x) := d/dx(f'(x)) → 4/(9*x^(2/3))
f2(x) := nthroot(x, 3)^4
# a) Write down the algorithm for Newton's method applied to this problem
x^(k + 1) == x^k - F(x^k)^-1*g(k)
g(k) := f'(k)
x_k1 := x^k - F(x^k)^-1*g(x^k) → -2*x^k
# b)
x^k == 2^k*x^0  # This will not converge to 0 and as long as x(0) is != 0
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f(x_1, x_2) := 100*(x_2 - x_1^2)^2 + (1 - x_1)^2
# a)
# Since both parts of the equation has to give 0
100*(x_2 - x_1^2)^2  # is only zero whenever x1 = x2
# the 2. parts of the equation will only give 0 whenever x1 = 1, therefore x2 and x1 has to be 1
# b)
# We compute the gradiant and hessian
f'(x_1, x_2) := [d/dx_1(f(x_1, x_2)); d/dx_2(f(x_1, x_2))] → [2*x_1 - 400*x_1*(x_2 - x_1^2) - 2; 200*x_2 - 200*x_1^2]
F(x_1, x_2) := [
    d^2/dx_1^2(f(x_1, x_2)), d/dx_2(d/dx_1(f(x_1, x_2)));
    d/dx_1(d/dx_2(f(x_1, x_2))), d^2/dx_2^2(f(x_1, x_2))
] → [1200*x_1^2 - 400*x_2 + 2, -400*x_1; -400*x_1, 200]
F_inv(x_1, x_2) := 1/(F(x_1, x_2)[1, 1]*F(x_1, x_2)[0, 0] - F(x_1, x_2)[0, 1]*F(x_1, x_2)[1, 0])*[F(x_1, x_2)[1, 1], -F(x_1, x_2)[1, 0]; -F(x_1, x_2)[0, 1], F(x_1, x_2)[0, 0]] → [
    200/(80000*x_1^2 - 80000*x_2 + 400), 400*x_1/(80000*x_1^2 - 80000*x_2 + 400);
    400*x_1/(80000*x_1^2 - 80000*x_2 + 400), (1200*x_1^2 - 400*x_2 + 2)/(80000*x_1^2 - 80000*x_2 + 400)
]
F_inv(x_1, x_2) → [
    200/(80000*x_1^2 - 80000*x_2 + 400), 400*x_1/(80000*x_1^2 - 80000*x_2 + 400);
    400*x_1/(80000*x_1^2 - 80000*x_2 + 400), (1200*x_1^2 - 400*x_2 + 2)/(80000*x_1^2 - 80000*x_2 + 400)
]
x^(k + 1) == x^k - F_inv(x_1, x_2)*f'(x_1, x_2)
xk(x_1, x_2) := [x_1; x_2] - F_inv(x_1, x_2)*f'(x_1, x_2)
xk(0, 0) → [1; 0]  # step 1
xk(1, 0) → [1; 1]  # step 2
# c)
xk_alpha(x_1, x_2, α) := [x_1; x_2] - α*f'(x_1, x_2)  # REMEMBE THIS IS THE GRADIANT ALGORITHM
xk_alpha(0, 0, 0.05) → [0.1; 0]
xk_alpha(0.1, 0, 0.05) → [0.17; 0.1]
