# 5.10) Write down the taylor series expansion of the following functions about the given points x0. Neglect terms of order three or higher.
# a)
f(x_1, x_2) := x_1*e^(-x_2) + x_2 + 1
x_0 := transpose([1, 0])
x := transpose([x_1, x_2])  # error: This variable is undefined. Check that the label is set correctly.
DF(x_1, x_2) := [d/dx_1(f(x_1, x_2)); d/dx_2(f(x_1, x_2))] → [e^(-x_2); 1 - x_1*e^(-x_2)]
D2F(x_1, x_2) := [
    d^2/dx_1^2(f(x_1, x_2)), d/dx_2(d/dx_1(f(x_1, x_2)));
    d/dx_1(d/dx_2(f(x_1, x_2))), d^2/dx_2^2(f(x_1, x_2))
] → [0, -e^(-x_2); -e^(-x_2), x_1*e^(-x_2)]
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# Remember, 1/2 comes from factorial etc
1/2! = 0.5
1/3! = 0.166667
f(1, 0) + transpose(DF(1, 0))*(x - x_0) + 1/2*transpose(x - x_0)*D2F(1, 0)*(x - x_0) simplify → x_1 + x_2 + x_2^2/2 - x_1*x_2 + 1
f(x_1, x_2) := x_1^4 + 2*x_1^2*x_2^2 + x_2^4
x_0 := transpose([1, 1])
x := transpose([x_1, x_2])  # error: This variable is undefined. Check that the label is set correctly.
# b)
DF(x_1, x_2) := [d/dx_1(f(x_1, x_2)); d/dx_2(f(x_1, x_2))] → [4*x_1^3 + 4*x_1*x_2^2; 4*x_1^2*x_2 + 4*x_2^3]
D2F(x_1, x_2) := [
    d^2/dx_1^2(f(x_1, x_2)), d/dx_2(d/dx_1(f(x_1, x_2)));
    d/dx_1(d/dx_2(f(x_1, x_2))), d^2/dx_2^2(f(x_1, x_2))
] → [12*x_1^2 + 4*x_2^2, 8*x_1*x_2; 8*x_1*x_2, 4*x_1^2 + 12*x_2^2]
f(1, 1) + transpose(DF(1, 1))*(x - x_0) + 1/2*transpose(x - x_0)*D2F(1, 1)*(x - x_0) simplify → 8*x_1^2 + 8*x_1*x_2 - 16*x_1 + 8*x_2^2 - 16*x_2 + 12
