# Opgave 5.9
f_1(x_1, x_2) := x_1^2 - x_2^2
f_2(x_1, x_2) := 2*x_1*x_2
2*x_1*x_2 == 16 solve, x_2 → 8/x_1
(8/x_1)^2 → 64/x_1^2
x_1^2 - 64/x_1^2 == 12 solve, x_1 → [4; -4; 2i; -2i]
2*4*x_2 == 16 solve, x_2 → 2
2*(-4)*x_2 == 16 solve, x_2 → -2
# This means we will have intersections at 4, 2 and -4,-2
# Sketch the levelset associated with f_1(x_1, x_2) == 12 and f_2(x_1, x_2) := 16 on the same diagram. Indicate on the diagram the values of x = [x1,x2]T for which f(x)=[f1(x1,x2) f2(x1,x2)]T = [12,16]T
x_1 := -5, 0.01 .. 5
# [plot: f_1sub(x_1) vs x_1]
